// SBML level 2 version 4

model Bovine()

  // Compartments:
  compartment default = 1 volume;

  // Species:
  substanceOnly species GnRH_Pit in default = 0.551;
  substanceOnly species LH_Pit in default = 4.563;
  substanceOnly species LH_Bld in default = 0.642;
  substanceOnly species GnRH_Hyp in default = 0.667;
  substanceOnly species FSH_Pit in default = 0.316;
  substanceOnly species FSH_Bld in default = 0.395;
  substanceOnly species Foll in default = 0.796;
  substanceOnly species CL in default = 0.0651;
  substanceOnly species E2 in default = 0.89;
  substanceOnly species P4 in default = 0.004;
  substanceOnly species Inh in default = 0.826;
  substanceOnly species OT in default = 0.0183;
  species Enz in default = 0;
  substanceOnly species PGF in default = 0.00506;
  substanceOnly species IOF in default = 0.253;
  substanceOnly species $src_GnRH in default = 0;
  substanceOnly species $src_E2 in default = 0;
  substanceOnly species $src_P4 in default = 0;
  substanceOnly species $src_Inh in default = 0;
  substanceOnly species $src_OT in default = 0;
  substanceOnly species $src_Enz in default = 0;
  substanceOnly species $src_PGF in default = 0;
  substanceOnly species $src_LH in default = 0;
  substanceOnly species $src_FSH in default = 0;
  substanceOnly species $snk_GnRH_Hyp in default = 0;
  substanceOnly species $src_GnRH_Pit in default = 0;
  substanceOnly species $src_Foll in default = 0;
  substanceOnly species $src_IOF in default = 0;
  substanceOnly species $src_CL in default = 0;
  substanceOnly species $snk_Inh in default = 0;
  substanceOnly species $snk_P4 in default = 0;
  substanceOnly species $snk_E2 in default = 0;
  substanceOnly species $snk_GnRH_Pit in default = 0;
  substanceOnly species $snk_LH in default = 0;
  substanceOnly species $snk_FSH in default = 0;
  substanceOnly species $snk_IOF in default = 0;
  substanceOnly species $snk_CL in default = 0;
  substanceOnly species $snk_Enz in default = 0;
  substanceOnly species $snk_OT in default = 0;
  substanceOnly species $snk_PGF in default = 0;
  substanceOnly species $snk_Foll in default = 0;

  // Parameters:
  par2 = 2.75 dimensionless; par2 is "k_G";
  par1 = 16 dimensionless; par1 is "GnRH_max";
  par3 = 2.05 dimensionless; par3 is "h_P4&E2_G";
  par4 = 0.0972 dimensionless; par4 is "T_E2_G1";
  par5 = 0.35 dimensionless; par5 is "T_p4_G1";
  par6 = 1.91 dimensionless; par6 is "h_p4_G2";
  par7 = 0.252 dimensionless; par7 is "T_p4_G2";
  par8 = 0.99 dimensionless; par8 is "h_e2_g2";
  par9 = 0.648 dimensionless; par9 is "T_e2_g2";
  par10 = 1.63 dimensionless; par10 is "cl_G";
  par21 = 4.21 dimensionless; par21 is "h_inh_fsh";
  par22 = 0.118 dimensionless; par22 is "T_inh_fsh";
  par23 = 0.293 dimensionless; par23 is "h_p4_fsh";
  par24 = 0.152 dimensionless; par24 is "T_p4_fsh";
  par25 = 0.396 dimensionless; par25 is "h_e2_fsh";
  par26 = 0.312 dimensionless; par26 is "T_e2_fsh";
  par27 = 1.23 dimensionless; par27 is "h_gnrh_fsh";
  par28 = 0.0708 dimensionless; par28 is "T_gnrh_fsh";
  par29 = 2.73 dimensionless; par29 is "cl_fsh";
  par30 = 0.948 dimensionless; par30 is "b_fsh";
  par31 = 0.376 dimensionless; par31 is "h_e2_lh";
  par32 = 0.243 dimensionless; par32 is "T_e2_lh";
  par33 = 2.71 dimensionless; par33 is "h_p4_lh";
  par34 = 0.0269 dimensionless; par34 is "T_p4_lh";
  par35 = 2.22 dimensionless; par35 is "h_gnrh_lh";
  par36 = 0.69 dimensionless; par36 is "T_gnrh_lh";
  par37 = 0.0141 dimensionless; par37 is "b_lh";
  par38 = 12 dimensionless; par38 is "cl_lh";
  par41 = 0.562 dimensionless; par41 is "h_fsh_foll";
  par42 = 0.57 dimensionless; par42 is "T_fsh_foll";
  par43 = 0.22 dimensionless; par43 is "T_foll_fsh";
  par45 = 1.1 dimensionless; par45 is "h_p4_fsh";
  par46 = 0.126 dimensionless; par46 is "T_p4_foll";
  par47 = 3.49 dimensionless; par47 is "h_lh_foll";
  par48 = 0.171 dimensionless; par48 is "T_lh_Foll";
  par56 = 53.91 dimensionless; par56 is "h_enz_pgf";
  par57 = 1.43 dimensionless; par57 is "T_enz_pgf";
  par58 = 1.087 dimensionless; par58 is "T_ot_pgf";
  par59 = 1.23 dimensionless; par59 is "cl_pgf";
  par62 = 0.2 dimensionless; par62 is "SF_CL";
  par63 = 0.0353 dimensionless; par63 is "h_cl_cl";
  par64 = 0.1 dimensionless; par64 is "T_cl_cl";
  par65 = 41.39 dimensionless; par65 is "h_iof_cl";
  par66 = 1.32 dimensionless; par66 is "T_iof_cl";
  par71 = 2.25 dimensionless; par71 is "k_cl_p4";
  par72 = 1.41 dimensionless; par72 is "cl_p4";
  par76 = 2.19 dimensionless; par76 is "k_foll_e2";
  par77 = 1.23 dimensionless; par77 is "cl_e2";
  par81 = 1.41 dimensionless; par81 is "k_foll_inh";
  par82 = 0.475 dimensionless; par82 is "cl_inh";
  par86 = 3.58 dimensionless; par86 is "h_p4_enz";
  par87 = 0.77 dimensionless; par87 is "T_p4_enz";
  par89 = 2.98 dimensionless; par89 is "cl_enz";
  par91 = 1.59 dimensionless; par91 is "h_e2cl_ot";
  par92 = 0.143 dimensionless; par92 is "T_e2_ot";
  par94 = 0.644 dimensionless; par94 is "cl_ot";
  par95 = 39.68 dimensionless; par95 is "h_pg_iof";
  par96 = 1.22 dimensionless; par96 is "T_pg_ot";
  par97 = 0.6 dimensionless; par97 is "T_cl_iof";
  par98 = 0.298 dimensionless; par98 is "cl_iof";

  // Reactions:
  re1: LH_Pit => LH_Bld; (par37 + par35*GnRH_Pit^5/(GnRH_Pit^5 + par36^5))*LH_Pit;  // modifiers: GnRH_Pit
  re2: FSH_Pit => FSH_Bld; (par30 + par23*P4^2/(P4^2 + par24^2) + par25*par26^2/(E2^2 + par26^2) + par27*GnRH_Pit/(par28 + GnRH_Pit))*FSH_Pit;  // modifiers: E2, P4, GnRH_Pit
  re3: GnRH_Hyp => $snk_GnRH_Hyp; (par3*(par5^2/(par5^2 + P4^2) + par4^2/(par4^2 + E2^2) - par5^2/(par5^2 + P4^2)*par4^2/(par4^2 + E2^2)) + par6*par7^2/(P4^2 + par7^2))*GnRH_Hyp;  // modifiers: E2, P4
  re4: $src_CL => CL; par62*par47*LH_Bld^2/(LH_Bld^2 + par48^2)*Foll + par63*CL^2/(CL^2 + par64^2);  // modifiers: Foll, LH_Bld
  re5: $src_GnRH => GnRH_Hyp; par2*(1 - GnRH_Hyp/par1);
  re6: $src_E2 => E2; par76*Foll^2;  // modifiers: Foll
  re7: $src_P4 => P4; par71*CL^2;  // modifiers: CL
  re8: $src_Inh => Inh; par81*Foll^2;  // modifiers: Foll
  re9: $src_OT => OT; par91*E2^2/(E2^2 + par92^2)*CL^2;  // modifiers: E2, CL
  re10: $src_Enz => Enz; par86*P4^5/(P4^5 + par87^5);  // modifiers: P4
  re11: $src_PGF => PGF; par56*Enz^5/(Enz^5 + par57^5)*OT^2/(OT^2 + par58^2);  // modifiers: OT, Enz
  re12: GnRH_Pit => $snk_GnRH_Pit; par10*GnRH_Pit;
  re13: LH_Bld => $snk_LH; par38*LH_Bld;
  re14: FSH_Bld => $snk_FSH; par29*FSH_Bld;
  re15: P4 => $snk_P4; par72*P4;
  re16: E2 => $snk_E2; par77*E2;
  re17: Inh => $snk_Inh; par82*Inh;
  re18: OT => $snk_OT; par94*OT;
  re19: Enz => $snk_Enz; par89*Enz;
  re20: PGF => $snk_PGF; par59*PGF;
  re21: IOF => $snk_IOF; par98*IOF;
  l: Foll => $snk_Foll; (par45*P4^5/(P4^5 + par46^5) + par47*LH_Bld^2/(LH_Bld^2 + par48^2))*Foll;  // modifiers: P4, LH_Bld
  re23: CL => $snk_CL; par65*IOF^5/(IOF^5 + par66^5)*CL;  // modifiers: IOF
  re24: $src_LH => LH_Pit; par31*E2^2/(E2^2 + par32^2) + par33*par34^2/(par34^2 + P4^2);  // modifiers: E2, P4
  re25: $src_FSH => FSH_Pit; par21*par22^5/(par22^5 + Inh^5);  // modifiers: Inh
  re26: $src_GnRH_Pit => GnRH_Pit; par8*E2^5/(E2^5 + par9^5)*(par3*(par5^2/(par5^2 + P4^2) + par4^2/(par4^2 + E2^2) - par5^2/(par5^2 + P4^2)*par4^2/(par4^2 + E2^2)) + par6*par7^2/(P4^2 + par7^2))*GnRH_Hyp;  // modifiers: GnRH_Hyp, E2, P4
  re27: $src_Foll => Foll; par41*FSH_Bld^2/((par42*par43^2/(par43^2 + Foll^2))^2 + FSH_Bld^2);  // modifiers: FSH_Bld
  re28: $src_IOF => IOF; par95*PGF^5/(PGF^5 + par96^5)*CL^10/(CL^10 + par97^10);  // modifiers: CL, PGF

  // Unit definitions:
  unit substance = mole;
  unit volume = litre;
  unit area = metre^2;
  unit length = metre;
  unit time = second;
end
