// SBML level 3 version 1

model HEAD()
  // ---------- PYRIDINE ----------

  // Compartments:
  compartment cell = 1;

  // Species:
  species A in cell = 1;
  species B in cell = 0;
  species C in cell = 0;
  species D in cell = 0;
  species E in cell = 0;
  species F in cell = 0;
  species G in cell = 0;

  // Reactions:
  reaction1: A => B; p1*A;
    p1 = 1;
  reaction2: B => C; p2*B;
    p2 = 0.494;
  reaction3: B + C => D + F; p3*B*C;
    p3 = 29;
  reaction4: C + C => E + F; p4*C*C;
    p4 = 9;
  reaction5: D => E; p5*D;
    p5 = 0.053;
  reaction6: C => F + G; p6*C;
    p6 = 2;
  reaction7: D => B + G; p7*D;
    p7 = 0.06;
  reaction8: E => C + G; p8*E;
    p8 = 5;
  reaction9: B => A; p9*B;
    p9 = 0.02;
  reaction10: D + F => B + C; p10*D*F;
    p10 = 0.5;
  reaction11: E + F => C + C; p11*E*F;
    p11 = 1.19;
end
