// SBML level 3 version 1

model HEAD()
  // ---------- N - HEXAN ----------

  // Compartments:
  compartment cell = 1;

  // Species:
  species CH4 in cell = 0;
  species C2H6 in cell = 0;
  species C2H4 in cell = 0;
  species C3H8 in cell = 0;
  species C3H6 in cell = 0;
  species C4H10 in cell = 0;
  species _1_C4H8 in cell = 0;
  species C4H6 in cell = 0;
  species _1_C5H10 in cell = 0;
  species C6H14 in cell = 0.0021;
  species BENZOL in cell = 0;
  species TOLUOL in cell = 0;
  species H in cell = 0;
  species CH3 in cell = 0;
  species C2H3 in cell = 0;
  species C2H5 in cell = 0;
  species C3H5 in cell = 0;
  species _1_C3H7 in cell = 0;
  species _2_C3H7 in cell = 0;
  species _1_M_AL in cell = 0;
  species _3_BEN in cell = 0;
  species _1_C4H9 in cell = 0;
  species _2_C4H9 in cell = 0;
  species I_C4H9 in cell = 0;
  species _4_PEN in cell = 0;
  species _1_M_BEN in cell = 0;
  species _1_E_AL in cell = 0;
  species _1_C5H11 in cell = 0;
  species _2_C5H11 in cell = 0;
  species _3_C5H11 in cell = 0;
  species _2_M_B in cell = 0;
  species _1_M_PEN in cell = 0;
  species _1_E_BEN in cell = 0;
  species _1_C6H13 in cell = 0;
  species _2_C6H13 in cell = 0;
  species _3_C6H13 in cell = 0;
  species _2_M_P in cell = 0;
  species _2_E_B in cell = 0;
  species _2_E_P in cell = 0;
  species _4_C7H15 in cell = 0;
  species H2 in cell = 0;
  species C2H2 in cell = 0;
  species C3H4 in cell = 0;
  species I_C4H8 in cell = 0;
  species _3_M_C4H8 in cell = 0;
  species C5H8 in cell = 0;
  species _3_M_C5H10 in cell = 0;
  species C6H10 in cell = 0;
  species TEER in cell = 0;
  species CH in cell = 0;
  species MCH in cell = 0;
  species ECH in cell = 0;
  species VCH in cell = 0;
  species CHD in cell = 0;
  species MCHD in cell = 0;
  species ECHD in cell = 0;
  species VCHD in cell = 0;
  species E_BENZOL in cell = 0;
  species STYROL in cell = 0;

  // Reactions:
  reaction1: CH4 => H + CH3; p1*CH4;
    p1 = 2.09603e-17;
  reaction2: C2H6 => H + C2H5; p2*C2H6;
    p2 = 7.3505e-15;
  reaction3: C2H6 => CH3 + CH3; p3*C2H6;
    p3 = 3.476822e-11;
  reaction4: C3H8 => H + _1_C3H7; p4*C3H8;
    p4 = 7.3505e-15;
  reaction5: C3H8 => CH3 + C2H5; p5*C3H8;
    p5 = 1.457613e-10;
  reaction6: C4H10 => CH3 + _1_C3H7; p6*C4H10;
    p6 = 1.457613e-10;
  reaction7: C4H10 => C2H5 + C2H5; p7*C4H10;
    p7 = 1.864635e-9;
  reaction8: C6H14 => CH3 + _1_C5H11; p8*C6H14;
    p8 = 8.722632e-10;
  reaction9: C6H14 => C2H5 + _1_C4H9; p9*C6H14;
    p9 = 1.455819e-9;
  reaction10: C6H14 => _1_C3H7 + _1_C3H7; p10*C6H14;
    p10 = 5.795718e-10;
  reaction11: C2H4 => H + C2H3; p11*C2H4;
    p11 = 6.186589e-21;
  reaction12: C3H6 => H + C3H5; p12*C3H6;
    p12 = 8.733383e-13;
  reaction13: C3H6 => CH3 + C2H3; p13*C3H6;
    p13 = 1.360492e-12;
  reaction14: _1_C4H8 => CH3 + C3H5; p14*_1_C4H8;
    p14 = 1.761953e-7;
  reaction15: I_C4H8 => H + _1_M_AL; p15*I_C4H8;
    p15 = 2.119383e-12;
  reaction16: _1_C5H10 => C2H5 + C3H5; p16*_1_C5H10;
    p16 = 3.981119e-7;
  reaction17: _3_M_C4H8 => CH3 + _1_M_AL; p17*_3_M_C4H8;
    p17 = 1.998976e-8;
  reaction18: _3_M_C5H10 => C2H5 + _1_M_AL; p18*_3_M_C5H10;
    p18 = 6.660927e-8;
  reaction19: _3_M_C5H10 => C2H3 + _2_C4H9; p19*_3_M_C5H10;
    p19 = 6.660927e-8;
  reaction20: C4H6 => C2H3 + C2H3; p20*C4H6;
    p20 = 6.640448e-7;
  reaction21: C5H8 => C2H3 + C3H5; p21*C5H8;
    p21 = 2.065277e-7;
  reaction22: C6H10 => C3H5 + C3H5; p22*C6H10;
    p22 = 2.065277e-7;
  reaction23: H + CH4 => H2 + CH3; p23*H*CH4;
    p23 = 16813930;
  reaction24: H + C2H6 => H2 + C2H5; p24*H*C2H6;
    p24 = 131032900;
  reaction25: H + C3H8 => H2 + _1_C3H7; p25*H*C3H8;
    p25 = 131032900;
  reaction26: H + C3H8 => H2 + _2_C3H7; p26*H*C3H8;
    p26 = 280453900;
  reaction27: H + C4H10 => H2 + _1_C4H9; p27*H*C4H10;
    p27 = 131032900;
  reaction28: H + C4H10 => H2 + _2_C4H9; p28*H*C4H10;
    p28 = 261284000;
  reaction29: H + C6H14 => H2 + _1_C6H13; p29*H*C6H14;
    p29 = 104083100;
  reaction30: H + C6H14 => H2 + _2_C6H13; p30*H*C6H14;
    p30 = 130952200;
  reaction31: H + C6H14 => H2 + _3_C6H13; p31*H*C6H14;
    p31 = 65631580;
  reaction32: H + C2H4 => H2 + C2H3; p32*H*C2H4;
    p32 = 13071050;
  reaction33: H + C3H6 => H2 + C3H5; p33*H*C3H6;
    p33 = 13071050;
  reaction34: H + _1_C4H8 => H2 + _1_M_AL; p34*H*_1_C4H8;
    p34 = 13071050;
  reaction35: H + _1_C4H8 => H2 + _3_BEN; p35*H*_1_C4H8;
    p35 = 341315.4;
  reaction36: H + _1_C5H10 => H2 + _1_E_AL; p36*H*_1_C5H10;
    p36 = 2071622;
  reaction37: H + _1_C5H10 => H2 + _1_M_BEN; p37*H*_1_C5H10;
    p37 = 131113.6;
  reaction38: H + _1_C5H10 => H2 + _4_PEN; p38*H*_1_C5H10;
    p38 = 271116.5;
  reaction39: CH3 + H2 => CH4 + H; p39*CH3*H2;
    p39 = 2310133;
  reaction40: CH3 + CH4 => CH4 + CH3; p40*CH3*CH4;
    p40 = 19732.77;
  reaction41: CH3 + C2H6 => CH4 + C2H5; p41*CH3*C2H6;
    p41 = 550354.4;
  reaction42: CH3 + C3H8 => CH4 + _1_C3H7; p42*CH3*C3H8;
    p42 = 291007.7;
  reaction43: CH3 + C3H8 => CH4 + _2_C3H7; p43*CH3*C3H8;
    p43 = 622853.2;
  reaction44: CH3 + C4H10 => CH4 + _1_C4H9; p44*CH3*C4H10;
    p44 = 341315.4;
  reaction45: CH3 + C4H10 => CH4 + _2_C4H9; p45*CH3*C4H10;
    p45 = 952527.8;
  reaction46: CH3 + C6H14 => CH4 + _1_C6H13; p46*CH3*C6H14;
    p46 = 341315.4;
  reaction47: CH3 + C6H14 => CH4 + _2_C6H13; p47*CH3*C6H14;
    p47 = 952527.8;
  reaction48: CH3 + C6H14 => CH4 + _3_C6H13; p48*CH3*C6H14;
    p48 = 477394.8;
  reaction49: CH3 + C2H4 => CH4 + C2H3; p49*CH3*C2H4;
    p49 = 1380726;
  reaction50: CH3 + C3H6 => CH4 + C3H5; p50*CH3*C3H6;
    p50 = 824727.5;
  reaction51: CH3 + _1_C4H8 => CH4 + _1_M_AL; p51*CH3*_1_C4H8;
    p51 = 824727.5;
  reaction52: CH3 + _1_C4H8 => CH4 + _3_BEN; p52*CH3*_1_C4H8;
    p52 = 271116.5;
  reaction53: CH3 + _1_C5H10 => CH4 + _1_E_AL; p53*CH3*_1_C5H10;
    p53 = 2071622;
  reaction54: CH3 + _1_C5H10 => CH4 + _1_M_BEN; p54*CH3*_1_C5H10;
    p54 = 952527.8;
  reaction55: CH3 + _1_C5H10 => CH4 + _4_PEN; p55*CH3*_1_C5H10;
    p55 = 341315.4;
  reaction56: C2H5 + H2 => C2H6 + H; p56*C2H5*H2;
    p56 = 151058.5;
  reaction57: C2H5 + CH4 => C2H6 + CH3; p57*C2H5*CH4;
    p57 = 41461.77;
  reaction58: C2H5 + C2H6 => C2H6 + C2H5; p58*C2H5*C2H6;
    p58 = 291007.7;
  reaction59: C2H5 + C3H8 => C2H6 + _1_C3H7; p59*C2H5*C3H8;
    p59 = 168139.3;
  reaction60: C2H5 + C3H8 => C2H6 + _2_C3H7; p60*C2H5*C3H8;
    p60 = 503662.7;
  reaction61: C2H5 + C4H10 => C2H6 + _1_C4H9; p61*C2H5*C4H10;
    p61 = 266482.9;
  reaction62: C2H5 + C4H10 => C2H6 + _2_C4H9; p62*C2H5*C4H10;
    p62 = 283230.3;
  reaction63: C2H5 + C6H14 => C2H6 + _1_C6H13; p63*C2H5*C6H14;
    p63 = 13355.78;
  reaction64: C2H5 + C6H14 => C2H6 + _2_C6H13; p64*C2H5*C6H14;
    p64 = 63407.37;
  reaction65: C2H5 + C6H14 => C2H6 + _3_C6H13; p65*C2H5*C6H14;
    p65 = 31778.97;
  reaction66: C2H5 + C2H4 => C2H6 + C2H3; p66*C2H5*C2H4;
    p66 = 131113.6;
  reaction67: C2H5 + C3H6 => C2H6 + C3H5; p67*C2H5*C3H6;
    p67 = 824727.5;
  reaction68: C2H5 + _1_C4H8 => C2H6 + _1_M_AL; p68*C2H5*_1_C4H8;
    p68 = 824727.5;
  reaction69: C2H5 + _1_C4H8 => C2H6 + _3_BEN; p69*C2H5*_1_C4H8;
    p69 = 271116.5;
  reaction70: C2H5 + _1_C5H10 => C2H6 + _1_E_AL; p70*C2H5*_1_C5H10;
    p70 = 824727.5;
  reaction71: C2H5 + _1_C5H10 => C2H6 + _1_M_BEN; p71*C2H5*_1_C5H10;
    p71 = 485994.9;
  reaction72: C2H5 + _1_C5H10 => C2H6 + _4_PEN; p72*C2H5*_1_C5H10;
    p72 = 243574.4;
  reaction73: _1_C3H7 + H2 => C3H8 + H; p73*_1_C3H7*H2;
    p73 = 204501.4;
  reaction74: _1_C3H7 + CH4 => C3H8 + CH3; p74*_1_C3H7*CH4;
    p74 = 4871.936;
  reaction75: _1_C3H7 + C2H6 => C3H8 + C2H5; p75*_1_C3H7*C2H6;
    p75 = 84165.55;
  reaction76: _1_C3H7 + C3H8 => C3H8 + _2_C3H7; p76*_1_C3H7*C3H8;
    p76 = 84165.55;
  reaction77: _1_C3H7 + C4H10 => C3H8 + _2_C4H9; p77*_1_C3H7*C4H10;
    p77 = 145759.6;
  reaction78: _1_C3H7 + C6H14 => C3H8 + _1_C6H13; p78*_1_C3H7*C6H14;
    p78 = 13355.78;
  reaction79: _1_C3H7 + C6H14 => C3H8 + _2_C6H13; p79*_1_C3H7*C6H14;
    p79 = 63407.37;
  reaction80: _1_C3H7 + C6H14 => C3H8 + _3_C6H13; p80*_1_C3H7*C6H14;
    p80 = 31778.97;
  reaction81: _1_C3H7 + C2H4 => C3H8 + C2H3; p81*_1_C3H7*C2H4;
    p81 = 2441.752;
  reaction82: _1_C3H7 + C3H6 => C3H8 + C3H5; p82*_1_C3H7*C3H6;
    p82 = 148294;
  reaction83: C2H3 + H2 => C2H4 + H; p83*C2H3*H2;
    p83 = 42130770;
  reaction84: C2H3 + CH4 => C2H4 + CH3; p84*C2H3*CH4;
    p84 = 12028.6;
  reaction85: C2H3 + C2H6 => C2H4 + C2H5; p85*C2H3*C2H6;
    p85 = 12028.6;
  reaction86: C2H3 + C3H8 => C2H4 + _1_C3H7; p86*C2H3*C3H8;
    p86 = 5239.051;
  reaction87: C2H3 + C3H8 => C2H4 + _2_C3H7; p87*C2H3*C3H8;
    p87 = 10440.41;
  reaction88: C2H3 + C4H10 => C2H4 + _1_C4H9; p88*C2H3*C4H10;
    p88 = 1656.733;
  reaction89: C2H3 + C4H10 => C2H4 + _2_C4H9; p89*C2H3*C4H10;
    p89 = 5422.827;
  reaction90: C2H3 + C6H14 => C2H4 + _1_C6H13; p90*C2H3*C6H14;
    p90 = 2919.052;
  reaction91: C2H3 + C6H14 => C2H4 + _2_C6H13; p91*C2H3*C6H14;
    p91 = 5422.827;
  reaction92: C2H3 + C6H14 => C2H4 + _3_C6H13; p92*C2H3*C6H14;
    p92 = 5422.827;
  reaction93: C2H3 + C3H6 => C2H4 + C3H5; p93*C2H3*C3H6;
    p93 = 110013.2;
  reaction94: C2H3 + _1_C4H8 => C2H4 + _1_M_AL; p94*C2H3*_1_C4H8;
    p94 = 10061.78;
  reaction95: C2H3 + _1_C5H10 => C2H4 + _1_E_AL; p95*C2H3*_1_C5H10;
    p95 = 100617.8;
  reaction96: C2H3 + _1_C5H10 => C2H4 + _1_M_BEN; p96*C2H3*_1_C5H10;
    p96 = 12028.6;
  reaction97: C2H3 + _1_C5H10 => C2H4 + _4_PEN; p97*C2H3*_1_C5H10;
    p97 = 12028.6;
  reaction98: C3H5 + H2 => C3H6 + H; p98*C3H5*H2;
    p98 = 42130770;
  reaction99: C3H5 + CH4 => C3H6 + CH3; p99*C3H5*CH4;
    p99 = 12028.6;
  reaction100: C3H5 + C2H6 => C3H6 + C2H5; p100*C3H5*C2H6;
    p100 = 12028.6;
  reaction101: C3H5 + C3H8 => C3H6 + _1_C3H7; p101*C3H5*C3H8;
    p101 = 1656.733;
  reaction102: C3H5 + C3H8 => C3H6 + _2_C3H7; p102*C3H5*C3H8;
    p102 = 8293.115;
  reaction103: C3H5 + C4H10 => C3H6 + _1_C4H9; p103*C3H5*C4H10;
    p103 = 659.5574;
  reaction104: C3H5 + C4H10 => C3H6 + _2_C4H9; p104*C3H5*C4H10;
    p104 = 5422.827;
  reaction105: C3H5 + C6H14 => C3H6 + _1_C6H13; p105*C3H5*C6H14;
    p105 = 659.5574;
  reaction106: C3H5 + C6H14 => C3H6 + _2_C6H13; p106*C3H5*C6H14;
    p106 = 5422.827;
  reaction107: C3H5 + C6H14 => C3H6 + _3_C6H13; p107*C3H5*C6H14;
    p107 = 5422.827;
  reaction108: C3H5 + C2H4 => C3H6 + C2H3; p108*C3H5*C2H4;
    p108 = 9230.854;
  reaction109: C3H5 + C3H6 => C3H6 + C3H5; p109*C3H5*C3H6;
    p109 = 34789.23;
  reaction110: C3H5 + _1_C4H8 => C3H6 + _1_M_AL; p110*C3H5*_1_C4H8;
    p110 = 5609.594;
  reaction111: C3H5 + _1_C5H10 => C3H6 + _1_E_AL; p111*C3H5*_1_C5H10;
    p111 = 590732.8;
  reaction112: C3H5 + _1_C5H10 => C3H6 + _1_M_BEN; p112*C3H5*_1_C5H10;
    p112 = 70620.6;
  reaction113: C3H5 + _1_C5H10 => C3H6 + _4_PEN; p113*C3H5*_1_C5H10;
    p113 = 70620.6;
  reaction114: H + C2H4 => C2H5; p114*H*C2H4;
    p114 = 12823940000;
  reaction115: H + C3H6 => _1_C3H7; p115*H*C3H6;
    p115 = 1019269000;
  reaction116: H + C3H6 => _2_C3H7; p116*H*C3H6;
    p116 = 3396379000;
  reaction117: H + _1_C4H8 => _1_C4H9; p117*H*_1_C4H8;
    p117 = 1927644000;
  reaction118: H + _1_C4H8 => _2_C4H9; p118*H*_1_C4H8;
    p118 = 5575152000;
  reaction119: H + _1_C5H10 => _1_C5H11; p119*H*_1_C5H10;
    p119 = 1927644000;
  reaction120: H + _1_C5H10 => _2_C5H11; p120*H*_1_C5H10;
    p120 = 5575152000;
  reaction121: H + C2H2 => C2H3; p121*H*C2H2;
    p121 = 15858700000;
  reaction122: CH3 + C2H4 => _1_C3H7; p122*CH3*C2H4;
    p122 = 1263586;
  reaction123: CH3 + C3H6 => _2_C4H9; p123*CH3*C3H6;
    p123 = 1677256;
  reaction124: CH3 + C3H6 => I_C4H9; p124*CH3*C3H6;
    p124 = 503352.6;
  reaction125: CH3 + _1_C4H8 => _3_C5H11; p125*CH3*_1_C4H8;
    p125 = 1219261;
  reaction126: CH3 + _1_C4H8 => _2_M_B; p126*CH3*_1_C4H8;
    p126 = 295885.5;
  reaction127: CH3 + _1_C5H10 => _3_C6H13; p127*CH3*_1_C5H10;
    p127 = 1219261;
  reaction128: CH3 + _1_C5H10 => _2_M_P; p128*CH3*_1_C5H10;
    p128 = 317594;
  reaction129: CH3 + C2H2 => C3H5; p129*CH3*C2H2;
    p129 = 107734.2;
  reaction130: C2H5 + C2H4 => _1_C4H9; p130*C2H5*C2H4;
    p130 = 91854.86;
  reaction131: C2H5 + C3H6 => _2_C5H11; p131*C2H5*C3H6;
    p131 = 62208.65;
  reaction132: C2H5 + C3H6 => _2_M_B; p132*C2H5*C3H6;
    p132 = 18669.11;
  reaction133: C2H5 + _1_C4H8 => _3_C6H13; p133*C2H5*_1_C4H8;
    p133 = 62208.65;
  reaction134: C2H5 + _1_C4H8 => _2_E_B; p134*C2H5*_1_C4H8;
    p134 = 18669.11;
  reaction135: C2H5 + _1_C5H10 => _4_C7H15; p135*C2H5*_1_C5H10;
    p135 = 62208.65;
  reaction136: C2H5 + _1_C5H10 => _2_E_P; p136*C2H5*_1_C5H10;
    p136 = 17393.02;
  reaction137: C2H5 + C2H2 => _1_M_AL; p137*C2H5*C2H2;
    p137 = 176845.5;
  reaction138: _1_C3H7 + C2H4 => _1_C5H11; p138*_1_C3H7*C2H4;
    p138 = 87117.92;
  reaction139: _1_C3H7 + C3H6 => _2_C6H13; p139*_1_C3H7*C3H6;
    p139 = 2855062;
  reaction140: C2H3 + C2H4 => _3_BEN; p140*C2H3*C2H4;
    p140 = 34682.27;
  reaction141: C2H3 + C3H6 => _1_M_BEN; p141*C2H3*C3H6;
    p141 = 34682.27;
  reaction142: C2H3 + _1_C4H8 => _1_E_BEN; p142*C2H3*_1_C4H8;
    p142 = 34682.27;
  reaction143: C3H5 + C2H4 => _4_PEN; p143*C3H5*C2H4;
    p143 = 173823.1;
  reaction144: C3H5 + C3H6 => _1_M_PEN; p144*C3H5*C3H6;
    p144 = 34682.27;
  reaction145: _1_C5H11 => _2_C5H11; p145*_1_C5H11;
    p145 = 70838.4;
  reaction146: _2_C5H11 => _1_C5H11; p146*_2_C5H11;
    p146 = 11443.47;
  reaction147: _1_C6H13 => _2_C6H13; p147*_1_C6H13;
    p147 = 6129628;
  reaction148: _2_C6H13 => _1_C6H13; p148*_2_C6H13;
    p148 = 990200.3;
  reaction149: _1_C6H13 => _3_C6H13; p149*_1_C6H13;
    p149 = 70838.4;
  reaction150: _3_C6H13 => _1_C6H13; p150*_3_C6H13;
    p150 = 11443.47;
  reaction151: C2H5 => H + C2H4; p151*C2H5;
    p151 = 11.96218;
  reaction152: _1_C3H7 => H + C3H6; p152*_1_C3H7;
    p152 = 32.77258;
  reaction153: _1_C3H7 => CH3 + C2H4; p153*_1_C3H7;
    p153 = 2293.137;
  reaction154: _2_C3H7 => H + C3H6; p154*_2_C3H7;
    p154 = 16.15443;
  reaction155: _1_C4H9 => H + _1_C4H8; p155*_1_C4H9;
    p155 = 20.6781;
  reaction156: _1_C4H9 => C2H5 + C2H4; p156*_1_C4H9;
    p156 = 48182.54;
  reaction157: _1_C4H9 => C3H6 + CH3; p157*_1_C4H9;
    p157 = 5849.438;
  reaction158: _2_C4H9 => H + _1_C4H8; p158*_2_C4H9;
    p158 = 11.53546;
  reaction159: _2_C4H9 => CH3 + C3H6; p159*_2_C4H9;
    p159 = 3901.024;
  reaction160: I_C4H9 => H + I_C4H8; p160*I_C4H9;
    p160 = 279.2491;
  reaction161: I_C4H9 => CH3 + C3H6; p161*I_C4H9;
    p161 = 5661.656;
  reaction162: _1_C5H11 => _1_C3H7 + C2H4; p162*_1_C5H11;
    p162 = 5958.482;
  reaction163: _2_C5H11 => C2H5 + C3H6; p163*_2_C5H11;
    p163 = 10498.44;
  reaction164: _3_C5H11 => CH3 + _1_C4H8; p164*_3_C5H11;
    p164 = 6518.884;
  reaction165: _2_M_B => CH3 + _1_C4H8; p165*_2_M_B;
    p165 = 6518.884;
  reaction166: _2_M_B => C2H5 + C3H6; p166*_2_M_B;
    p166 = 8339.21;
  reaction167: _1_C6H13 => _1_C4H9 + C2H4; p167*_1_C6H13;
    p167 = 10498.44;
  reaction168: _2_C6H13 => _1_C3H7 + C3H6; p168*_2_C6H13;
    p168 = 10498.44;
  reaction169: _3_C6H13 => C2H5 + _1_C4H8; p169*_3_C6H13;
    p169 = 10498.44;
  reaction170: _3_C6H13 => CH3 + _1_C5H10; p170*_3_C6H13;
    p170 = 5178.134;
  reaction171: _2_M_P => _1_C3H7 + C3H6; p171*_2_M_P;
    p171 = 8339.21;
  reaction172: _2_E_B => C2H5 + _1_C4H8; p172*_2_E_B;
    p172 = 8339.21;
  reaction173: _4_C7H15 => C2H5 + _1_C5H10; p173*_4_C7H15;
    p173 = 8339.21;
  reaction174: _2_E_P => C2H5 + _1_C5H10; p174*_2_E_P;
    p174 = 8339.21;
  reaction175: _2_E_P => _1_C3H7 + _1_C4H8; p175*_2_E_P;
    p175 = 8339.21;
  reaction176: C2H3 => H + C2H2; p176*C2H3;
    p176 = 0.2061452;
  reaction177: C3H5 => CH3 + C2H2; p177*C3H5;
    p177 = 0.2338764;
  reaction178: _1_M_AL => H + C4H6; p178*_1_M_AL;
    p178 = 0.4374339;
  reaction179: _1_M_AL => C2H3 + C2H4; p179*_1_M_AL;
    p179 = 103.636;
  reaction180: _3_BEN => C2H3 + C2H4; p180*_3_BEN;
    p180 = 351.1211;
  reaction181: _1_E_AL => CH3 + C4H6; p181*_1_E_AL;
    p181 = 1446.872;
  reaction182: _1_M_BEN => C2H3 + C3H6; p182*_1_M_BEN;
    p182 = 351.1211;
  reaction183: _4_PEN => C3H5 + C2H4; p183*_4_PEN;
    p183 = 351.1211;
  reaction184: _1_M_PEN => C3H5 + C3H6; p184*_1_M_PEN;
    p184 = 320147;
  reaction185: _1_E_BEN => CH3 + C5H8; p185*_1_E_BEN;
    p185 = 351.1211;
  reaction186: H + H => H2; p186*H*H;
    p186 = 1000000000;
  reaction187: H + C2H3 => C2H4; p187*H*C2H3;
    p187 = 10000000000;
  reaction188: H + C3H5 => C3H6; p188*H*C3H5;
    p188 = 19952620000;
  reaction189: CH3 + CH3 => C2H6; p189*CH3*CH3;
    p189 = 50118720000;
  reaction190: CH3 + C2H5 => C3H8; p190*CH3*C2H5;
    p190 = 31622780000;
  reaction191: CH3 + C2H3 => C3H6; p191*CH3*C2H3;
    p191 = 10000000000;
  reaction192: CH3 + C3H5 => _1_C4H8; p192*CH3*C3H5;
    p192 = 19952620000;
  reaction193: CH3 + _1_M_AL => _3_M_C4H8; p193*CH3*_1_M_AL;
    p193 = 3162278000;
  reaction194: CH3 + _1_E_AL => _3_M_C5H10; p194*CH3*_1_E_AL;
    p194 = 3162278000;
  reaction195: C2H5 + C2H5 => C4H10; p195*C2H5*C2H5;
    p195 = 3981072000;
  reaction196: C2H5 + C2H3 => _1_C4H8; p196*C2H5*C2H3;
    p196 = 1000000000;
  reaction197: C2H5 + C3H5 => _1_C5H10; p197*C2H5*C3H5;
    p197 = 3162278000;
  reaction198: C2H5 + _1_M_AL => _3_M_C5H10; p198*C2H5*_1_M_AL;
    p198 = 1000000000;
  reaction199: C2H5 + _1_E_AL => TEER; p199*C2H5*_1_E_AL;
    p199 = 1000000000;
  reaction200: _1_C3H7 + _1_C3H7 => C6H14; p200*_1_C3H7*_1_C3H7;
    p200 = 3162278000;
  reaction201: C2H3 + C2H3 => C4H6; p201*C2H3*C2H3;
    p201 = 12589250000;
  reaction202: C2H3 + C3H5 => C5H8; p202*C2H3*C3H5;
    p202 = 1000000000;
  reaction203: C2H3 + _1_M_AL => C6H10; p203*C2H3*_1_M_AL;
    p203 = 1000000000;
  reaction204: C3H5 + C3H5 => C6H10; p204*C3H5*C3H5;
    p204 = 3162278000;
  reaction205: C3H5 + _1_M_AL => TEER; p205*C3H5*_1_M_AL;
    p205 = 316227800;
  reaction206: C3H5 + _1_E_AL => TEER; p206*C3H5*_1_E_AL;
    p206 = 316227800;
  reaction207: _1_M_AL + _1_M_AL => TEER; p207*_1_M_AL*_1_M_AL;
    p207 = 316227800;
  reaction208: _1_M_AL + _1_E_AL => TEER; p208*_1_M_AL*_1_E_AL;
    p208 = 316227800;
  reaction209: _1_E_AL + _1_E_AL => TEER; p209*_1_E_AL*_1_E_AL;
    p209 = 316227800;
  reaction210: CH3 + C2H5 => CH4 + C2H4; p210*CH3*C2H5;
    p210 = 251188600;
  reaction211: CH3 + C2H3 => CH4 + C2H2; p211*CH3*C2H3;
    p211 = 1000000000;
  reaction212: CH3 + C3H5 => CH4 + C3H4; p212*CH3*C3H5;
    p212 = 1000000000;
  reaction213: CH3 + _1_M_AL => CH4 + C4H6; p213*CH3*_1_M_AL;
    p213 = 7943282000;
  reaction214: C2H5 + C2H5 => C2H6 + C2H4; p214*C2H5*C2H5;
    p214 = 50118720;
  reaction215: C2H5 + C2H3 => C2H6 + C2H2; p215*C2H5*C2H3;
    p215 = 100000000;
  reaction216: C2H5 + C2H3 => C2H4 + C2H4; p216*C2H5*C2H3;
    p216 = 316227800;
  reaction217: C2H5 + C3H5 => C2H6 + C3H4; p217*C2H5*C3H5;
    p217 = 398107200;
  reaction218: C2H5 + C3H5 => C2H4 + C3H6; p218*C2H5*C3H5;
    p218 = 398107200;
  reaction219: C2H5 + _1_M_AL => C2H6 + C4H6; p219*C2H5*_1_M_AL;
    p219 = 1258925000;
  reaction220: C2H5 + _1_M_AL => C2H4 + _1_C4H8; p220*C2H5*_1_M_AL;
    p220 = 316227800;
  reaction221: C2H3 + C2H3 => C2H4 + C2H2; p221*C2H3*C2H3;
    p221 = 3162278000;
  reaction222: C2H3 + C3H5 => C2H4 + C3H4; p222*C2H3*C3H5;
    p222 = 1000000000;
  reaction223: C2H3 + _1_M_AL => C2H4 + C4H6; p223*C2H3*_1_M_AL;
    p223 = 1000000000;
  reaction224: C3H5 + C3H5 => C3H6 + C3H4; p224*C3H5*C3H5;
    p224 = 3162278000;
  reaction225: C3H5 + _1_M_AL => C3H6 + C4H6; p225*C3H5*_1_M_AL;
    p225 = 6309573000;
  reaction226: C3H5 + _1_M_AL => C3H4 + _1_C4H8; p226*C3H5*_1_M_AL;
    p226 = 1000000000;
  reaction227: _1_M_AL + _1_M_AL => C4H6 + _1_C4H8; p227*_1_M_AL*_1_M_AL;
    p227 = 3162278000;
  reaction228: C4H6 + C2H4 => CH; p228*C4H6*C2H4;
    p228 = 0.1106928;
  reaction229: C4H6 + C3H6 => MCH; p229*C4H6*C3H6;
    p229 = 0.2208613;
  reaction230: C4H6 + _1_C4H8 => ECH; p230*C4H6*_1_C4H8;
    p230 = 0.01497625;
  reaction231: C4H6 + C4H6 => VCH; p231*C4H6*C4H6;
    p231 = 0.1443312;
  reaction232: CH => H2 + CHD; p232*CH;
    p232 = 7.062102e-5;
  reaction233: MCH => H2 + MCHD; p233*MCH;
    p233 = 1.902896e-5;
  reaction234: MCH => CH4 + CHD; p234*MCH;
    p234 = 6.494879e-6;
  reaction235: ECH => H2 + ECHD; p235*ECH;
    p235 = 1.902896e-5;
  reaction236: VCH => H2 + VCHD; p236*VCH;
    p236 = 5.219758e-5;
  reaction237: CHD => H2 + BENZOL; p237*CHD;
    p237 = 0.08547146;
  reaction238: MCHD => H2 + TOLUOL; p238*MCHD;
    p238 = 0.1897046;
  reaction239: ECHD => H2 + E_BENZOL; p239*ECHD;
    p239 = 0.1897046;
  reaction240: VCHD => H2 + STYROL; p240*VCHD;
    p240 = 0.05998986;
end
