// SBML level 2 version 4

model Goldbeter1995()
  // Goldbeter1995_CircClock
  // This model is automatically converted from the Model BIOMD0000000016 by using libsbml. According to the terms of use, this generated model is not related with Model BIOMD0000000016 any more.
  // biomodels.db:BIOMD0000000016
  // biomodels.db:MODEL6617161845
  // isDescribedBy pubmed:8587874
  // isVersionOf GO:0007623
  // taxonomy:7227 kegg.pathway:dme04710

  // Compartments:
  compartment default = 1e-15;
  compartment CYTOPLASM in default = 1e-15;  // GO:0005737
  compartment NUCLEUS in CYTOPLASM = 1e-15;  // GO:0005634

  // Species:
  // boundaryCondition changed from default (i.e. false) to true, because EmptySet acts as a reactant. Nicolas Le Novere
  species $EmptySet in default = 0;
  // Initial condition changed from amount to concentration as per article. Bruce Shapiro
  species M in CYTOPLASM = 0.1; M is "PER mRNA";  // isVersionOf CHEBI:33699 kegg.compound:C00046
  // Initial condition changed from amount to concentration as per article. Bruce Shapiro
  species unphosphorylated_PER in CYTOPLASM = 0.25;  // isVersionOf uniprot:P07663
  // Initial condition changed from amount to concentration as per article. Bruce Shapiro
  species monophosphorylated_PER in CYTOPLASM = 0.25;  // isVersionOf uniprot:P07663
  // Initial condition changed from amount to concentration as per article. Bruce Shapiro
  species biphosphorylated_PER in CYTOPLASM = 0.25;  // isVersionOf uniprot:P07663
  // Initial condition changed from amount to concentration as per article. Bruce Shapiro
  species Pn in NUCLEUS = 0.25; Pn is "nuclear PER";  // uniprot:P07663
  // Initial condition changed from amount to concentration as per article. Bruce Shapiro
  // initial concentration for Pt is not used becuase Pt is determined by an Assigment Rule
  species Pt in CYTOPLASM; Pt is "total PER";  // uniprot:P07663

  // Assignment rules:
  // Conversion to number of molecules removed to give result in micromoles.
  // Pn added to formula for consistency with reference. Bruce Shapiro
  Pt := unphosphorylated_PER + monophosphorylated_PER + biphosphorylated_PER + Pn;

  // Reactions:
  // Formula modified to give units of substance/time Bruce Shapiro
  rM: $EmptySet => M; default*Vs*KI^n/(KI^n + Pn^n); rM is "transcription of PER";  // modifiers: Pn; isVersionOf GO:0009299 GO:0006355
    Vs = 0.76; KI = 1; n = 4;
  // Formula modified to give units of substance/time Bruce Shapiro
  rTL: $EmptySet => unphosphorylated_PER; ks*M*default; rTL is "translation of PER";  // modifiers: M; isVersionOf GO:0006412
    ks = 0.38;
  // Formula modified to give units of substance/time Bruce Shapiro
  rP01: unphosphorylated_PER => monophosphorylated_PER; CYTOPLASM*V1*unphosphorylated_PER/(K1 + unphosphorylated_PER); rP01 is "first phosphorylation of PER";  // isVersionOf ec-code:2.7.11.1 GO:0006468
    V1 = 3.2; K1 = 2;
  // Formula modified to give units of substance/time Bruce Shapiro
  rP10: monophosphorylated_PER => unphosphorylated_PER; CYTOPLASM*V2*monophosphorylated_PER/(K2 + monophosphorylated_PER); rP10 is "removal of the first PER phosphate";  // isVersionOf ec-code:3.1.3.16 GO:0006470
    V2 = 1.58; K2 = 2;
  // Formula modified to give units of substance/time Bruce Shapiro
  rP12: monophosphorylated_PER => biphosphorylated_PER; CYTOPLASM*V3*monophosphorylated_PER/(K3 + monophosphorylated_PER); rP12 is "second phosphorylation of PER";  // isVersionOf ec-code:2.7.11.1 GO:0006468
    V3 = 5; K3 = 2;
  // Formula modified to give units of substance/time Bruce Shapiro
  rP21: biphosphorylated_PER => monophosphorylated_PER; CYTOPLASM*V4*biphosphorylated_PER/(K4 + biphosphorylated_PER); rP21 is "removal of the second PER phosphate";  // isVersionOf ec-code:3.1.3.16 GO:0006470
    V4 = 2.5; K4 = 2;
  // Formula modified to give units of substance/time Bruce Shapiro
  rP2n: biphosphorylated_PER => Pn; k1*biphosphorylated_PER*CYTOPLASM; rP2n is "translocation of PER to the nucleus";  // isVersionOf GO:0006606
    k1 = 1.9;
  // Formula modified to give units of substance/time Bruce Shapiro
  rPn2: Pn => biphosphorylated_PER; k2*Pn*NUCLEUS; rPn2 is "translocation of PER to the cytoplasm";  // isVersionOf GO:0006611
    k2 = 1.3;
  // Formula modified to give units of substance/time Bruce Shapiro
  rmRNAd: M => $EmptySet; Vm*M*CYTOPLASM/(Km + M); rmRNAd is "degradation of PER mRNA";  // isVersionOf GO:0006402
    Km = 0.5; Vm = 0.65;
  // Formula modified to give units of substance/time Bruce Shapiro
  rVd: biphosphorylated_PER => $EmptySet; CYTOPLASM*Vd*biphosphorylated_PER/(Kd + biphosphorylated_PER); rVd is "degradation of PER";  // isVersionOf GO:0006402
    Vd = 0.95; Kd = 0.2;

  // Unit definitions:
  // Default unit of substance redefined to micromole by comparison with the article. Nicolas Le Novere
  unit substance = 1e-6 mole; substance is "micromole (default)";
  // Default unit of time redefined to hour by comparison with the article. Nicolas Le Novere
  unit time = 3600 second; time is "heure (default)";
end
