// SBML level 2 version 4

model Leloup1999_CircClock_periodic()
  // Leloup1999_CircClock
  // This model is automatically converted from the Model BIOMD0000000021 by using libsbml. According to the terms of use, this generated model is not related with Model BIOMD0000000021 any more.
  // biomodels.db:BIOMD0000000021
  // biomodels.db:MODEL6617834203
  // isDescribedBy pubmed:10366496
  // isVersionOf GO:0007623
  // taxonomy:7227 kegg.pathway:dme04710
  // isDerivedFrom biomodels.db:BIOMD0000000171

  // Compartments:
  compartment Cell = 1; Cell is "cytoplasm";  // GO:0005737
  compartment nucleus in Cell = 1;  // GO:0005634

  // Species:
  species PER_Protein_unphosphorylated in Cell = 0; PER_Protein_unphosphorylated is "PER Protein (unphosphorylated)";  // isVersionOf uniprot:P07663
  species T0 in Cell = 0; T0 is "TIM Protein (unphosphorylated)";  // isVersionOf uniprot:P49021
  species PER_Protein_mono_phosphorylated in Cell = 0; PER_Protein_mono_phosphorylated is "PER Protein (mono-phosphorylated)";  // isVersionOf uniprot:P07663
  species T1 in Cell = 0; T1 is "TIM Protein (mono-phosphorylated)";  // isVersionOf uniprot:P49021
  species PER_Protein_bi_phosphorylated in Cell = 0; PER_Protein_bi_phosphorylated is "PER Protein (bi-phosphorylated)";  // isVersionOf uniprot:P07663
  species T2 in Cell = 0; T2 is "TIM Protein (bi-phosphorylated)";  // isVersionOf uniprot:P49021
  species CC in Cell = 0; CC is "Cytosolic PER-TIM Complex";  // hasPart uniprot:P49021 uniprot:P07663
  species Cn in nucleus = 0; Cn is "Nuclear PER-TIM Complex";  // hasPart uniprot:P49021 uniprot:P07663
  species Mp in Cell = 0; Mp is "PER mRNA";  // isVersionOf CHEBI:33699 kegg.compound:C00046
  species Mt in Cell = 0; Mt is "TIM mRNA";  // isVersionOf CHEBI:33699 kegg.compound:C00046

  // Parameters:
  var Pt; Pt is "Total Per";
  var Tt; Tt is "Total Tim";
  // V_mT=.7 (physiological oscillations); 0.28 (chaos); .4 or .99 (biorhythmicity example)
  V_mT = 0.7;
  // V_dT=2 (physiological oscillations); 4.8 (chaos); 3.8 or 2 (biorhythmicity example)
  V_dT = 2;

  // Assignment rules:
  Pt := CC + Cn + PER_Protein_unphosphorylated + PER_Protein_mono_phosphorylated + PER_Protein_bi_phosphorylated;
  Tt := CC + Cn + T0 + T1 + T2;

  // Reactions:
  // This phosphorylation is triggered by the protein product of the gene double-time (DBT, DCO_DROME). Not explicitely represented in the model.
  P0_to_P1: PER_Protein_unphosphorylated => PER_Protein_mono_phosphorylated; Cell*V_1P*PER_Protein_unphosphorylated/(K1_P + PER_Protein_unphosphorylated); P0_to_P1 is "First Phosphorylation of PER";  // isVersionOf ec-code:2.7.11.1 GO:0006468
    K1_P = 2; V_1P = 8;
  T0_to_T1: T0 => T1; Cell*V_1T*T0/(K_1T + T0); T0_to_T1 is "First Phosphorylation of TIM";  // isVersionOf ec-code:2.7.11.1 GO:0006468
    K_1T = 2; V_1T = 8;
  P1_to_P0: PER_Protein_mono_phosphorylated => PER_Protein_unphosphorylated; Cell*V_2P*PER_Protein_mono_phosphorylated/(K_2P + PER_Protein_mono_phosphorylated); P1_to_P0 is "Dephosphorylation of PER (1st P)";  // isVersionOf ec-code:3.1.3.16 GO:0006470
    K_2P = 2; V_2P = 1;
  T1_to_T0: T1 => T0; Cell*V_2T*T1/(K_2T + T1); T1_to_T0 is "Dephosphorylation of TIM (1st P)";  // isVersionOf ec-code:3.1.3.16 GO:0006470
    K_2T = 2; V_2T = 1;
  // This phosphorylation is triggered by the protein product of the gene double-time (DBT, DCO_DROME). Not explicitely represented in the model.
  P1_to_P2: PER_Protein_mono_phosphorylated => PER_Protein_bi_phosphorylated; Cell*V_3P*PER_Protein_mono_phosphorylated/(K_3P + PER_Protein_mono_phosphorylated); P1_to_P2 is "Second Phosphorylation of PER";  // isVersionOf ec-code:2.7.11.1 GO:0006468
    K_3P = 2; V_3P = 8;
  T1_to_T2: T1 => T2; Cell*V_3T*T1/(K_3T + T1); T1_to_T2 is "Second Phosphorylation of TIM";  // isVersionOf ec-code:2.7.11.1 GO:0006468
    K_3T = 2; V_3T = 8;
  P2_to_P1: PER_Protein_bi_phosphorylated => PER_Protein_mono_phosphorylated; Cell*V_4P*PER_Protein_bi_phosphorylated/(K_4P + PER_Protein_bi_phosphorylated); P2_to_P1 is "Dephosphorylation of PER (2nd P)";  // isVersionOf ec-code:3.1.3.16 GO:0006470
    K_4P = 2; V_4P = 1;
  T2_to_T1: T2 => T1; Cell*V_4T*T2/(K_4T + T2); T2_to_T1 is "Dephosphorylation of TIM (2nd P)";  // isVersionOf ec-code:3.1.3.16 GO:0006470
    K_4T = 2; V_4T = 1;
  P0_degradation: PER_Protein_unphosphorylated => ; Cell*P0_degradation_k_d*PER_Protein_unphosphorylated; P0_degradation is "PER degradation";  // isVersionOf GO:0030163
    P0_degradation_k_d = 0.01;
  T0_degradation: T0 => ; Cell*T0_degradation_k_d*T0; T0_degradation is "TIM degradation";  // isVersionOf GO:0030163
    T0_degradation_k_d = 0.01;
  P1_degradation: PER_Protein_mono_phosphorylated => ; Cell*P1_degradation_k_d*PER_Protein_mono_phosphorylated; P1_degradation is "PER-1 degradation";  // isVersionOf GO:0030163
    P1_degradation_k_d = 0.01;
  T1_degradation: T1 => ; Cell*T1_degradation_k_d*T1; T1_degradation is "TIM-1 degradation";  // isVersionOf GO:0030163
    T1_degradation_k_d = 0.01;
  P2_degradation: PER_Protein_bi_phosphorylated => ; Cell*P2_degradation_k_d*PER_Protein_bi_phosphorylated + Cell*V_dP*PER_Protein_bi_phosphorylated/(K_dP + PER_Protein_bi_phosphorylated); P2_degradation is "PER-2 degradation";  // isVersionOf GO:0030163
    P2_degradation_k_d = 0.01; V_dP = 2; K_dP = 0.2;
  T2_degradation: T2 => ; Cell*T2_degradation_k_d*T2 + Cell*V_dT*T2/(K_dT + T2); T2_degradation is "TIM-2 degradation";  // isVersionOf GO:0030163
    T2_degradation_k_d = 0.01; K_dT = 0.2;
  PT_complex_formation: PER_Protein_bi_phosphorylated + T2 -> CC; Cell*k3*PER_Protein_bi_phosphorylated*T2 - Cell*k4*CC; PT_complex_formation is "PER-TIM complex formation";  // isVersionOf GO:0006461
    k3 = 1.2; k4 = 0.6;
  PT_complex_nucleation: CC -> Cn; Cell*k1*CC - nucleus*k2*Cn; PT_complex_nucleation is "PER-TIM complex nucleation";  // isVersionOf GO:0006606
    k1 = 0.6; k2 = 0.2;
  PT_complex_degradation: CC => ; Cell*k_dC*CC; PT_complex_degradation is "PER-TIM complex degradation (cytosol)";  // isVersionOf GO:0030163
    k_dC = 0.01;
  PTnucl_complex_degradation: Cn => ; nucleus*k_dN*Cn; PTnucl_complex_degradation is "PER-TIM complex degradation (nuclear)";  // isVersionOf GO:0030163
    k_dN = 0.01;
  Mp_production: => Mp; Cell*v_sP*K_IP^Mp_production_n/(K_IP^Mp_production_n + Cn^Mp_production_n); Mp_production is "PER mRNA production";  // modifiers: Cn; isVersionOf GO:0009299 GO:0006355
    v_sP = 1; K_IP = 1; Mp_production_n = 4;
  Mt_production: => Mt; Cell*V_sT*K_IT^Mt_production_n/(K_IT^Mt_production_n + Cn^Mt_production_n); Mt_production is "TIM mRNA production";  // modifiers: Cn; isVersionOf GO:0009299 GO:0006355
    V_sT = 1; K_IT = 1; Mt_production_n = 4;
  P0_production: => PER_Protein_unphosphorylated; Cell*k_sP*Mp; P0_production is "PER production";  // modifiers: Mp; isVersionOf GO:0006412
    k_sP = 0.9;
  T0_production: => T0; Cell*k_sT*Mt; T0_production is "TIM production";  // modifiers: Mt; isVersionOf GO:0006412
    k_sT = 0.9;
  Mp_degradation: Mp => ; Cell*Mp_degradation_k_d*Mp + Cell*V_mP*Mp/(K_mP + Mp); Mp_degradation is "PER mRNA degradation";  // isVersionOf GO:0006402
    Mp_degradation_k_d = 0.01; V_mP = 0.7; K_mP = 0.2;
  Mt_degradation: Mt => ; Cell*Mt_degradation_k_d*Mt + Cell*V_mT*Mt/(K_mT + Mt); Mt_degradation is "TIM mRNA degradation";  // isVersionOf GO:0006402
    Mt_degradation_k_d = 0.01; K_mT = 0.2;

  // Unit definitions:
  unit substance = 1e-9 mole; substance is "nanomole (default)";
  unit time = 3600 second; time is "hour (default)";
end
